#path __BM_PLUGIN_FILE__ "BodyModelConfig.any"
#define BM_CONFIG_PLUGIN __BM_PLUGIN_FILE__

// ----------------------------------------------------------
// Model configuration:
// For more info on body model configuration options please load the model and double click on:
// #include "<ANYBODY_PATH_AMMR>\Documentation\bm_config\index.html"
// ----------------------------------------------------------
Main = {

  #define BM_SCALING _SCALING_XYZ_
  #define BM_MANNEQUIN_DRIVER_DEFAULT OFF

  #ifndef BM_LEG_MODEL
  #define BM_LEG_MODEL _LEG_MODEL_TLEM2_
  #endif
  #define BM_LEG_MUSCLES_BOTH _MUSCLES_SIMPLE_

  #define BM_ARM_RIGHT ON
  #define BM_ARM_LEFT ON
  #define BM_ARM_MUSCLES_BOTH _MUSCLES_SIMPLE_

  #define BM_TRUNK_THORACIC_MODEL _THORACIC_MODEL_FLEXIBLE_
  #define BM_TRUNK_MUSCLES _MUSCLES_SIMPLE_
//  #define BM_TRUNK_LIGAMENTS ON
  #define BM_TRUNK_LUMBAR_DISC_STIFFNESS _DISC_STIFFNESS_NONLINEAR_
  #define BM_TRUNK_THORACIC_DISC_STIFFNESS _DISC_STIFFNESS_NONLINEAR_
  #define BM_TRUNK_CERVICAL_DISC_STIFFNESS _DISC_STIFFNESS_LINEAR_
  #define BM_TRUNK_LUMBAR_RHYTHM _RHYTHM_SOFT_
  #define BM_TRUNK_THORACIC_RHYTHM _RHYTHM_SOFT_
  #define BM_TRUNK_CERVICAL_RHYTHM _RHYTHM_SOFT_
  #define SPINE_MARKERS_SINGLE

};
