// EXAMPLE of MarkerProcol file for the plug-in-gait protocol.

#define _LPSI
#define _RPSI
#define _RASI
#define _LASI
#define _RFHD
#define _LFHD
#define _RBHD
#define _LBHD
#define _STRN
#define _CLAV
#define _L5
#define _L4
#define _L3
#define _L2
#define _L1
// #define _T11
#define _T7
// #define _T3
// #define _T10
#define _C7
#define _RTHI
#define _RKNE
#define _RMKN
#define _RTIB
#define _RANK
#define _RTOE
#define _RHEE
#define _RMT5
#define _LTHI
#define _LKNE
#define _LMKN
#define _LTIB
#define _LANK
#define _LTOE
#define _LHEE
#define _LMT5

#define _RSHO
#define _LSHO
#define _RUPA
#define _LUPA
#define _RELB
#define _LELB
#define _RMEL
#define _LMEL
#define _LFRA
#define _RFRA
#define _RWRA
#define _RWRB
#define _LWRA
#define _LWRB
#define _RFIN
#define _LFIN

#include "ExcludeMarkers.any"

#ifdef _LPSI
// Marker on the Left Posterior Superior Iliac
CreateMarkerDriver LPSI (
UseC3DWeightResiduals = OFF,
MarkerPlacement=Trunk.Segments.PelvisSeg,
PlaceMarkerAt=Left.PSIS,
OptX=ON, OptY=ON, OptZ=ON,
UseC3DWeightResiduals=OFF
) = {
  sRelOpt ={-0.020, 0.0, 0.0};
};
#endif

#ifdef _RPSI
// Marker on the Right Posterior Superior Iliac
CreateMarkerDriver RPSI (
MarkerPlacement=Trunk.Segments.PelvisSeg,
PlaceMarkerAt=Right.PSIS,
OptX=ON, OptY=ON, OptZ=ON,
UseC3DWeightResiduals=OFF
) = {
  sRelOpt ={-0.020, 0.0, 0.0};
};
#endif

#ifdef _RASI
// Marker on the Right Anterior Superior Iliac
CreateMarkerDriver RASI (
MarkerPlacement=Trunk.Segments.PelvisSeg,
PlaceMarkerAt=Right.ASIS,
OptX=OFF, OptY=OFF, OptZ=ON,
UseC3DWeightResiduals=OFF
) = {
  sRelOpt = {0.025, 0.0, 0.0};
};
#endif

#ifdef _LASI
// Marker on the Left Anterior Superior Iliac
CreateMarkerDriver LASI (
MarkerName= LASI ,
MarkerPlacement=Trunk.Segments.PelvisSeg,
PlaceMarkerAt=Left.ASIS,
OptX=OFF, OptY=OFF, OptZ=ON,
UseC3DWeightResiduals=OFF
) = {
  sRelOpt = {0.025, 0.00, 0.0};
};
#endif

//// Head
#ifdef _RFHD
// Marker on the Right Front Head
CreateMarkerDriver RFHD (
MarkerPlacement = Trunk.Segments.SkullSeg,
PlaceMarkerAt=AnatomicalFrame,
OptX=OFF,OptY=OFF,OptZ=ON,
UseC3DWeightResiduals=OFF
) = {
  sRelOpt = {0.11,0.06,0.045};
};
#endif

#ifdef _LFHD
// Marker on the Left Front Head
CreateMarkerDriver LFHD (
MarkerPlacement = Trunk.Segments.SkullSeg,
PlaceMarkerAt=AnatomicalFrame,
OptX=OFF,OptY=OFF,OptZ=ON,
UseC3DWeightResiduals=OFF
) = {
  sRelOpt = {0.11,0.06,-0.045};
};
#endif


#ifdef _RBHD
// Marker on the Right Back Head
CreateMarkerDriver RBHD (
MarkerPlacement = Trunk.Segments.SkullSeg,
PlaceMarkerAt=AnatomicalFrame,
OptX=OFF ,OptY=ON ,OptZ=ON,
UseC3DWeightResiduals=OFF
) = {
  sRelOpt = {-0.07,0.05,0.08};
};
#endif

#ifdef _LBHD
// Marker on the Left Back Head
CreateMarkerDriver LBHD (
MarkerPlacement = Trunk.Segments.SkullSeg,
PlaceMarkerAt=AnatomicalFrame,
OptX=OFF,OptY=ON,OptZ= ON,
WeightX=1.0,WeightY=1.0,WeightZ=1.0,
UseC3DWeightResiduals=OFF
) = {
  sRelOpt = {-0.07,0.05,-0.08};
};
#endif

//// Thorax

#ifdef _STRN
// Marker on the Sternum
CreateMarkerDriver STRN (
MarkerPlacement=Trunk.Segments.SternalBodySeg,
PlaceMarkerAt = XiphoidProcess,
ScaleMarkerPosOnOff=OFF,
OptX=ON,OptY=ON,OptZ=OFF,
UseC3DWeightResiduals = OFF,
WeightX=1,WeightY=1,WeightZ=1
) = {
  sRelOpt = {0.02, 0, 0};
};
#endif

#ifdef _CLAV
// Marker on the Clavicle
CreateMarkerDriver CLAV (
MarkerPlacement=Trunk.Segments.SternumSeg,
PlaceMarkerAt=ij,
OptX=ON,OptY=ON,OptZ=OFF,
WeightX=1.0,WeightY=2,WeightZ=1.0,
UseC3DWeightResiduals=OFF,
ScaleMarkerPosOnOff=OFF
) = {
  sRelOpt = {0.02,0.00,0.0};
};
#endif

#ifdef _L5
// Marker on the Lumbar Vertebra L5
CreateMarkerDriver L5 (
MarkerName= L5,
MarkerPlacement = Trunk.Segments.L5Seg,
PlaceMarkerAt = SpinousProcess,
ScaleMarkerPosOnOff=OFF,
OptX=OFF,OptY=OFF,OptZ=OFF
) = {
  sRelOpt = {-0.02, 0.0, 0};
};
#endif

#ifdef _L4
// Marker on the Lumbar Vertebra L4
CreateMarkerDriver L4 (
MarkerName= L4,
MarkerPlacement = Trunk.Segments.L4Seg,
PlaceMarkerAt = SpinousProcess,
ScaleMarkerPosOnOff=OFF,
OptX=ON,OptY=ON,OptZ=OFF
) = {
  sRelOpt = {-0.02, 0.00, 0};
};
#endif

#ifdef _L3
// Marker on the Lumbar Vertebra L3
CreateMarkerDriver L3 (
MarkerName= L3,
MarkerPlacement = Trunk.Segments.L3Seg,
PlaceMarkerAt = SpinousProcess,
ScaleMarkerPosOnOff=OFF,
OptX=ON,OptY=ON,OptZ=OFF
) = {
  sRelOpt = {-0.02, 0, 0};
};
#endif

#ifdef _L2
// Marker on the Lumbar Vertebra L2
CreateMarkerDriver L2 (
MarkerName= L2,
MarkerPlacement = Trunk.Segments.L2Seg,
PlaceMarkerAt = SpinousProcess,
ScaleMarkerPosOnOff=OFF,
OptX=ON,OptY=ON,OptZ=OFF
) = {
  sRelOpt = {-0.02, 0.00, 0};
};
#endif

#ifdef _L1
// Marker on the Lumbar Vertebra L1
CreateMarkerDriver L1 (
MarkerName= L1,
MarkerPlacement = Trunk.Segments.L1Seg,
PlaceMarkerAt = SpinousProcess,
ScaleMarkerPosOnOff=OFF,
OptX=OFF,OptY=OFF,OptZ=OFF
) = {
  sRelOpt = {-0.02, 0, 0};
};
#endif


#ifdef _T7
// Marker on the Thoracic Vertebra T7
CreateMarkerDriver T7 (
MarkerName= T7,
MarkerPlacement = Trunk.Segments.T7Seg,
PlaceMarkerAt = SpinousProcess,
ScaleMarkerPosOnOff=OFF,
OptX=OFF,OptY=ON,OptZ=OFF
) = {
  sRelOpt = {-0.020,0,0};
};
#endif


#ifdef _C7
// Marker on the Cervical Vertebra 10
CreateMarkerDriver C7 (
MarkerPlacement=Trunk.Segments.C7Seg,
PlaceMarkerAt = SpinousProcess,
OptX=OFF,OptY=OFF,OptZ=OFF,
UseC3DWeightResiduals=OFF,
ScaleMarkerPosOnOff=OFF
) = {
  sRelOpt = {-0.025,0,0};
};
#endif


//// Lower Extremity Markers
#ifdef _RTHI
// Marker on the Right Thigh
CreateMarkerDriver RTHI (
MarkerName=RTHI3,
OptX=ON,OptY=ON,OptZ=ON,
MarkerPlacement =Right.Leg.Seg.Thigh,
PlaceMarkerAt=AnatomicalFrame,
UseC3DWeightResiduals=OFF
)= {
  sRelOpt = {0.0, -0.28, 0.1};
};
#endif

#ifdef _RKNE
// Marker on the Right Knee
CreateMarkerDriver RKNE (
MarkerPlacement= Right.Leg.Seg.Thigh,
PlaceMarkerAt = EpicondylusFemorisLateralis,
OptX=OFF,OptY=OFF,OptZ=OFF,
WeightX=1.0,WeightY=1.0,WeightZ=1.0,
UseC3DWeightResiduals=OFF
) = {
  sRelOpt = {0.00, 0.0, 0.015};
};
#endif

#ifdef _RMKN
// Marker on the Right Knee
CreateMarkerDriver RMKN (
MarkerPlacement= Right.Leg.Seg.Thigh,
PlaceMarkerAt = EpicondylusFemorisMedialis,
OptX=OFF,OptY=ON,OptZ=OFF,
WeightX=1.0,WeightY=1.0,WeightZ=1.0,
UseC3DWeightResiduals=OFF
) = {
  sRelOpt = {0.00, 0.0, -0.015};
};
#endif


#ifdef _RTIB
// Marker on the Right Tibia
CreateMarkerDriver RTIB (
MarkerPlacement=Right.Leg.Seg.Shank,
PlaceMarkerAt=AnatomicalFrame,
OptX=ON,OptY=ON,OptZ=ON,
UseC3DWeightResiduals=OFF
) = {
  sRelOpt = {0.0, -0.1, 0.05};
};
#endif

#ifdef _RANK
// Marker on the Right Lateral Ankle
CreateMarkerDriver RANK (
MarkerName= RANK ,
MarkerPlacement=Right.Leg.Seg.Shank,
PlaceMarkerAt = LateralMalleolus,
OptX=OFF,OptY=OFF,OptZ=OFF,
UseC3DWeightResiduals=OFF
) = {
  sRelOpt = {-0.00, -0.0, 0.015};
};
#endif

#ifdef _RTOE
// Marker on the Right Toe
CreateMarkerDriver RTOE (
MarkerPlacement=Right.Leg.Seg.Foot.Metatarsal1,
PlaceMarkerAt=AnatomicalFrame,
OptX=OFF,OptY=OFF,OptZ=OFF,
UseC3DWeightResiduals = OFF
) = {
  sRelOpt = {0.1354858, -0.06, -0.035};
};
#endif

#ifdef _RHEE
// Marker on the Right Heel
CreateMarkerDriver RHEE (
MarkerPlacement=Right.Leg.Seg.Foot.Calcaneus,
PlaceMarkerAt = HeelNode,
OptX=OFF, OptY=ON , OptZ=OFF,
WeightX=1.0,WeightY=1.0,WeightZ=1.0,
UseC3DWeightResiduals=OFF
) = {
  sRelOpt =  {-0.015, 0.01, 0.0};
};
#endif


// Marker on the Right Metatarsel 5
#ifdef _RMT5
CreateMarkerDriver RMT5 (
MarkerPlacement=Right.Leg.Seg.Foot.Metatarsal5,
PlaceMarkerAt=AnatomicalFrame,
OptX=OFF,OptY=OFF,OptZ=OFF,
UseC3DWeightResiduals = OFF
) = {
  sRelOpt =  {0.11, -0.06, 0.05};
};
#endif

#ifdef _LTHI
// Marker on the Left Thigh
CreateMarkerDriver LTHI (
MarkerName= LTHI ,
MarkerPlacement=Left.Leg.Seg.Thigh,
PlaceMarkerAt=AnatomicalFrame,
OptX=ON,OptY=ON,OptZ=ON,
UseC3DWeightResiduals=OFF
) = {
  sRelOpt = {0.0, -0.28, -0.1};
};
#endif

#ifdef _LKNE
// Marker on the Left Knee
CreateMarkerDriver LKNE (
MarkerName= LKNE ,
MarkerPlacement=Left.Leg.Seg.Thigh,
PlaceMarkerAt = EpicondylusFemorisLateralis,
OptX=OFF,OptY=OFF,OptZ=OFF,
UseC3DWeightResiduals=OFF
) = {
  sRelOpt = {0.00, -0.0, -0.015};
};
#endif

#ifdef _LMKN
// Marker on the medial Left Knee
CreateMarkerDriver LMKN (
MarkerPlacement= Left.Leg.Seg.Thigh,
PlaceMarkerAt = EpicondylusFemorisMedialis,
OptX=OFF,OptY=ON,OptZ=OFF,
WeightX=1.0,WeightY=1.0,WeightZ=1.0,
UseC3DWeightResiduals=OFF
) = {
  sRelOpt = {0.00, 0.0, 0.015};
};
#endif


#ifdef _LTIB
// Marker on the Left Tibia
CreateMarkerDriver LTIB (
MarkerPlacement=Left.Leg.Seg.Shank,
PlaceMarkerAt=AnatomicalFrame,
OptX=ON,OptY=ON,OptZ=ON,
UseC3DWeightResiduals=OFF
) = {
  sRelOpt = {0.0, -0.1, -0.05};
};
#endif

#ifdef _LANK
// Marker on the Left Ankle
CreateMarkerDriver LANK (
MarkerPlacement=Left.Leg.Seg.Shank,
PlaceMarkerAt = LateralMalleolus,
OptX=OFF,OptY=OFF,OptZ=OFF,
UseC3DWeightResiduals=OFF
) = {
  sRelOpt = {-0.0, -0.0, -0.015};
};
#endif

#ifdef _LTOE
// Marker on the Left Toe
CreateMarkerDriver LTOE (
MarkerPlacement=Left.Leg.Seg.Foot.Metatarsal1,
PlaceMarkerAt=AnatomicalFrame,
OptX=OFF,OptY=OFF,OptZ=OFF,
UseC3DWeightResiduals = OFF
) = {
  sRelOpt = {0.1354858, -0.06, 0.035};
};
#endif

#ifdef _LHEE
// Marker on the Left Heel
CreateMarkerDriver LHEE(
MarkerPlacement=Left.Leg.Seg.Foot.Calcaneus,
PlaceMarkerAt = HeelNode,
OptX=OFF, OptY=ON, OptZ=OFF,
WeightX=1.0,WeightY=1.0,WeightZ=1.0,
UseC3DWeightResiduals=OFF
) = {
  sRelOpt =  {-0.015, 0.01, 0.0};
};
#endif

#ifdef _LMT5
// Marker on the Right Metatarsel 5
CreateMarkerDriver LMT5 (
MarkerPlacement=Left.Leg.Seg.Foot.Metatarsal5,
PlaceMarkerAt=AnatomicalFrame,
OptX=OFF,OptY=OFF,OptZ=OFF,
UseC3DWeightResiduals = OFF
) = {
  sRelOpt =  {0.11, -0.06, -0.05};
};
#endif


//// Trunk markers

#ifdef _RSHO
CreateMarkerDriver RSHO (
MarkerPlacement=Right.ShoulderArm.Segments.Clavicula,
OptX=ON,OptY=OFF,OptZ=OFF,
WeightX=1,WeightY=1,WeightZ=1,
PlaceMarkerAt = acj,
// We align the marker direction with acj so the marker is locked in the directions perpendicula
// to rotation around sternum.
AlignMarkerWith = acj,
ScaleMarkerPosOnOff=OFF,
) = {
  sRelOpt = {0, 0.02, 0};
};
#endif

#ifdef _LSHO
// Marker on the Left Acromio-clavicular joint
CreateMarkerDriver LSHO (
MarkerPlacement=Left.ShoulderArm.Segments.Clavicula,
OptX=ON,OptY=OFF,OptZ=OFF,
WeightX=1,WeightY=1,WeightZ=1,
PlaceMarkerAt = acj,
AlignMarkerWith = acj,
ScaleMarkerPosOnOff=OFF,
) = {
  sRelOpt = {0, -0.02, -0.00};
};
#endif


#ifdef _RUPA
// Marker on the Right Upper Arm
CreateMarkerDriver RUPA (
MarkerPlacement=Right.ShoulderArm.Segments.Humerus,
PlaceMarkerAt=AnatomicalFrame,
OptX=ON,OptY=ON,OptZ=ON,
UseC3DWeightResiduals=OFF
) = {
  sRelOpt ={0.01,-0.24,0.03};
};
#endif


#ifdef _LUPA
// Marker on the Left Upper Arm
CreateMarkerDriver LUPA (
MarkerPlacement=Left.ShoulderArm.Segments.Humerus,
PlaceMarkerAt=AnatomicalFrame,
OptX=ON,OptY=ON,OptZ=ON,
UseC3DWeightResiduals=OFF
) = {
  sRelOpt ={0.01,-0.19,-0.03};
};
#endif


#ifdef _RELB
// Marker on the Right Elbow
CreateMarkerDriver RELB (
MarkerPlacement=Right.ShoulderArm.Segments.Humerus,
PlaceMarkerAt=EpicondylusHumerusLateralis,
OptX=OFF,OptY=OFF,OptZ=OFF,
UseC3DWeightResiduals=OFF
) = {
  sRelOpt = {0,0, 0.015};
};
#endif


#ifdef _LELB
// Marker on the Left Elbow
CreateMarkerDriver LELB (
MarkerPlacement=Left.ShoulderArm.Segments.Humerus,
PlaceMarkerAt=EpicondylusHumerusLateralis,
OptX=OFF,OptY=OFF,OptZ=OFF,
UseC3DWeightResiduals=OFF
) = {
  sRelOpt = {0,0, -0.015};
};
#endif

#ifdef _RMEL
// Marker on the medial right Elbow
CreateMarkerDriver RMEL (
MarkerPlacement=Right.ShoulderArm.Segments.Humerus,
PlaceMarkerAt=EpicondylusHumerusMedialis,
OptX=OFF,OptY=OFF,OptZ=OFF,
UseC3DWeightResiduals=OFF
) = {
  sRelOpt = {0,0, -0.015};
};
#endif


#ifdef _LMEL
// Marker on the medial Left Elbow
CreateMarkerDriver LMEL (
MarkerPlacement=Left.ShoulderArm.Segments.Humerus,
PlaceMarkerAt=EpicondylusHumerusMedialis,
OptX=OFF,OptY=OFF,OptZ=OFF,
UseC3DWeightResiduals=OFF
) = {
  sRelOpt = {0,0, 0.015};
};
#endif


#ifdef _LFRA
// Marker on the Left Radius
CreateMarkerDriver LFRA (
MarkerPlacement=Left.ShoulderArm.Segments.Radius,
PlaceMarkerAt=AnatomicalFrame,
OptX=ON,OptY=ON,OptZ=ON,
UseC3DWeightResiduals=OFF
) = {
  sRelOpt = {-0.03,-0.2, -0.01};
};
#endif

#ifdef _RFRA
// Marker on the Right Radius
CreateMarkerDriver RFRA (
MarkerPlacement=Right.ShoulderArm.Segments.Radius,
PlaceMarkerAt=AnatomicalFrame,
OptX=ON,OptY=ON,OptZ=ON,
UseC3DWeightResiduals=OFF
) = {
  sRelOpt = {-0.03, -0.13, 0.01};
};
#endif

#ifdef _RWRA
// Marker on the Right Wrist A
CreateMarkerDriver RWRA (
MarkerPlacement=Right.ShoulderArm.Segments.Radius,
PlaceMarkerAt=RadiusStylo,
OptX=ON,OptY=ON,OptZ=OFF,
UseC3DWeightResiduals=OFF
) = {
  sRelOpt = {0.01, 0, 0};
};
#endif

#ifdef _RWRB
// Marker on the Right Wrist B
CreateMarkerDriver RWRB (
MarkerPlacement=Right.ShoulderArm.Segments.Radius,
PlaceMarkerAt=UlnaStylo,
OptX=OFF ,OptY=OFF,OptZ=OFF,
WeightX=1,WeightY=1,WeightZ=1,
UseC3DWeightResiduals=OFF
) = {
  sRelOpt = {0.0, 0.0, 0.0};
};
#endif

#ifdef _LWRA
// Marker on the Left Wrist A
CreateMarkerDriver LWRA (
MarkerPlacement=Left.ShoulderArm.Segments.Radius,
PlaceMarkerAt=RadiusStylo,
OptX=ON,OptY=ON,OptZ=OFF,
UseC3DWeightResiduals=OFF
) = {
  sRelOpt = {0.01, 0.0, 0.0};
};
#endif

#ifdef _LWRB
// Marker on the Left Wrist B
CreateMarkerDriver LWRB (
MarkerPlacement=Left.ShoulderArm.Segments.Radius,
PlaceMarkerAt=UlnaStylo,
OptX=OFF  ,OptY=OFF ,OptZ=OFF,
WeightX=1,WeightY=1,WeightZ=1,
UseC3DWeightResiduals=OFF
) = {
  sRelOpt = {0.0, 0.0, 0.0};
};
#endif


#ifdef _RFIN
// Marker on the Right Finger
CreateMarkerDriver RFIN (
MarkerPlacement=Right.ShoulderArm.Segments.Hand.Carpals,
PlaceMarkerAt=HandMid,
OptX=OFF ,OptY=ON,OptZ=OFF,
UseC3DWeightResiduals=OFF
) = {
  sRelOpt = {0.0, 0.0, 0.0};
};
#endif


#ifdef _LFIN
// Marker on the Left Finger
CreateMarkerDriver LFIN (
MarkerPlacement=Left.ShoulderArm.Segments.Hand.Carpals,
PlaceMarkerAt=HandMid,
OptX=OFF ,OptY=ON,OptZ=OFF,
UseC3DWeightResiduals=OFF
) = {
  sRelOpt = {0.0, 0.0, 0.0};
};
#endif
